# OpenSim document version 40500
InverseKinematicsTool:
  time_range: 0.001 0.0791
  marker_file: kinematics/forward/smoothed_coordinates0_forward.trc
  IKTaskSet:
    IKMarkerTask pelvis_top: apply=true weight=1
    IKMarkerTask hip: apply=true weight=1
    IKMarkerTask knee: apply=true weight=1
    IKMarkerTask ankle: apply=true weight=1
    IKMarkerTask toe: apply=true weight=1
    IKMarkerTask pelvis_bottom: apply=true weight=1
    IKMarkerTask mtp: apply=true weight=1
