# OpenSim document version 40500
AnalyzeTool RatHindlimbRight-scaled:
  replace_force_set: false
  results_directory: MuscleAnalysisPointKin_formuscleacc
  output_precision: 8
  initial_time: 0.0002254
  final_time: 0.0797746
  solve_for_equilibrium_for_auxiliary_states: false
  maximum_number_of_integrator_steps: 20000
  maximum_integrator_step_size: 1
  minimum_integrator_step_size: 1e-8
  integrator_error_tolerance: 1e-5
  lowpass_cutoff_frequency_for_coordinates: -1
  AnalysisSet Analyses:
    MuscleAnalysis: start_time=0.0002254 end_time=0.0797746 step_interval=1 in_degrees=true muscle_list=all
        moment_arm_coordinate_list=all compute_moments=true
    PointKinematics [values shared by the 8 below unless stated]: start_time=0.0002254 end_time=0.0797746
        step_interval=1 in_degrees=true relative_to_body_name=ground
    PointKinematics: body_name=femur point_name=LGinsertion point=(-0.005 -0.043 0.003)
    PointKinematics: body_name=foot point_name=LGorigin point=(-0.006 0.001 0.001)
    PointKinematics: body_name=femur point_name=MGinsertion point=(-0.004 -0.042 -0.003)
    PointKinematics: body_name=foot point_name=MGorigin point=(-0.006 0.001 0.001)
    PointKinematics: body_name=femur point_name=Plainsertion point=(-0.003 -0.042 0.002)
    PointKinematics: body_name=foot point_name=Plaorigin point=(-0.006 0.001 0.001)
    PointKinematics: body_name=tibia point_name=Solinsertion point=(-0.005 0.046 0.003)
    PointKinematics: body_name=foot point_name=Solorigin point=(-0.006 0.001 0.001)
