# OpenSim document version 40500
ScaleTool RatHindlimbRight-scaled:
  mass: 0.02091 [kg]
  height: -1
  age: -1
  ModelScaler:
    apply: true
    scaling_order: measurements manualScale
    marker_file: Datarat25/baseline_forward_2mm/kinematics/kinematics_3_pos0.0.trc
    time_range: 0 0.08
    preserve_mass_distribution: true
    MeasurementSet:
      Measurement spine: apply=true
        MarkerPair: markers=(pelvis_top pelvis_bottom)
        BodyScale spine: axes=(X Y Z)
        BodyScale pelvis: axes=(X Y Z)
      Measurement femur: apply=true
        MarkerPair: markers=(knee hip)
        BodyScale femur: axes=(X Y Z)
      Measurement tibia: apply=true
        MarkerPair: markers=(knee ankle)
        BodyScale tibia: axes=(X Y Z)
      Measurement foot: apply=true
        MarkerPair: markers=(ankle toe)
        BodyScale foot: axes=(X Y Z)
      Measurement tibia-femur: apply=false
        MarkerPair: markers=(hip knee)
        MarkerPair: markers=(knee ankle)
    ScaleSet:
      Scale: scales=(1.16 1.16 1.16) segment=femur apply=true
      Scale: scales=(1.0952 1.0952 1.0952) segment=tibia apply=true
  MarkerPlacer:
    apply: true
    marker_file: Datarat25/baseline_forward_2mm/kinematics/kinematics_3_pos0.0.trc
    time_range: 0 0.001
    max_marker_movement: -1
    IKTaskSet:
      IKMarkerTask pelvis_top: apply=true weight=50
      IKMarkerTask hip: apply=true weight=100
      IKMarkerTask knee: apply=false weight=50
      IKMarkerTask ankle: apply=true weight=100
      IKMarkerTask toe: apply=true weight=100
      IKMarkerTask pelvis_bottom: apply=true weight=50
      IKMarkerTask mtp: apply=true weight=100
      IKCoordinateTask [values shared by the 8 below unless stated]: value_type=manual_value weight=10 value=0
      IKCoordinateTask sacrum_pitch: apply=true weight=1 value=1.069712
      IKCoordinateTask sacrum_roll: apply=true weight=0 value=1.340587
      IKCoordinateTask hip_add: apply=false
      IKCoordinateTask hip_int: apply=false
      IKCoordinateTask knee_flx: apply=false value_type=from_file
      IKCoordinateTask ankle_flx: apply=false value_type=from_file
      IKCoordinateTask ankle_add: apply=true
      IKCoordinateTask ankle_int: apply=false
