# OpenSim document version 40500
ScaleTool RatHindlimbRight-scaled:
  mass: 0.02091 [kg]
  height: -1
  age: -1
  ModelScaler:
    apply: true
    scaling_order: measurements
    marker_file: DataMarch2025/baseline_ForwardOnly/kinematics/kinematics_2_pos0.0.trc
    time_range: 0 0.07
    preserve_mass_distribution: true
    MeasurementSet:
      Measurement spine: apply=true
        MarkerPair: markers=(pelvis_top pelvis_bottom)
        BodyScale spine: axes=(X Y Z)
        BodyScale pelvis: axes=(X Y Z)
      Measurement femur: apply=true
        MarkerPair: markers=(knee hip)
        BodyScale femur: axes=(X Y Z)
      Measurement tibia: apply=true
        MarkerPair: markers=(knee ankle)
        BodyScale tibia: axes=(X Y Z)
      Measurement foot: apply=true
        MarkerPair: markers=(ankle toe)
        BodyScale foot: axes=(X Y Z)
      Measurement tibia-femur: apply=false
        MarkerPair: markers=(hip knee)
        MarkerPair: markers=(knee ankle)
  MarkerPlacer:
    apply: true
    marker_file: DataMarch2025/baseline_ForwardOnly/kinematics/kinematics_2_pos0.0.trc
    time_range: 0 0.001
    max_marker_movement: -1
    IKTaskSet:
      IKMarkerTask pelvis_top: apply=true weight=50
      IKMarkerTask hip: apply=true weight=100
      IKMarkerTask knee: apply=true weight=50
      IKMarkerTask ankle: apply=true weight=100
      IKMarkerTask toe: apply=true weight=100
      IKMarkerTask pelvis_bottom: apply=true weight=50
      IKMarkerTask mtp: apply=true weight=100
