# OpenSim document version 40500
Model RatHindlimbRight-scaled:
  gravity: 0 -9.80665 0
  credits: Model authors names..
  publications: List of publications related to model...
  length_units: m
  force_units: N
  Ground: meshes=ground.vtp
  BodySet:
    Body spine: mass=0.012546 [kg] mass_center=(0 0 0) inertia=(3.300282e-7 3.300282e-7 3.300282e-7 0 0 0)
        meshes=spine.vtp
    Body pelvis: mass=0.002091 mass_center=(0 0 0) inertia=(2.750235e-7 2.406456e-7 2.406456e-7 0 0 0)
        meshes=pelvis.vtp
      WrapCylinder hip_cylinder_small: active=false xyz_body_rotation=(0 1.48353 0)
          translation=(0.008109478 0.001621896 -0.003649265) quadrant=-x radius=0.004054739 length=0.04865687
      WrapCylinder hip_cylinder_small2: active=false xyz_body_rotation=(0 1.48353 0)
          translation=(0.008109478 0.0008109478 -0.003649265) quadrant=all radius=0.004054739 length=0.04865687
      WrapCylinder hip_cylinder_large2: active=false xyz_body_rotation=(0 1.48353 0)
          translation=(0.008109478 0.003243791 0.002432843) quadrant=-x radius=0.00202737 length=0.04865687
    Body femur: mass=0.002091 mass_center=(0 -0.01675979 0) inertia=(2.114431e-7 3.263011e-8 2.114431e-7 0 0 0)
        meshes=femur.vtp
      WrapCylinder femur_prox: active=false xyz_body_rotation=(0 0.436332 0) translation=(0.001117319 -0.006703915 0)
          quadrant=-x radius=0.005139668 length=0.05586596
      WrapCylinder femur_prox2: active=false xyz_body_rotation=(0 0.436332 0) translation=(0.001117319 -0.006703915 0)
          quadrant=all radius=0.005139668 length=0.05586596
      WrapTorus femur_dist: active=false xyz_body_rotation=(1.72489 0 0.0977454)
          translation=(0.006067043 -0.0335531 -0.0005139668) quadrant=all inner_radius=0.004469277
          outer_radius=0.006703915
      WrapCylinder femur_shaft_large: active=false xyz_body_rotation=(1.72489 0 -0.785398)
          translation=(-0.0007150843 -0.01742459 0.002067041) quadrant=y radius=0.003016762 length=0.03416762
      WrapCylinder femur_shaft_small: active=false xyz_body_rotation=(1.72489 0 0.0977454)
          translation=(-0.0007150843 -0.01686593 0.002067041) quadrant=all radius=0.002011175 length=0.0330503
    Body tibia: mass=0.002091 mass_center=(0 0.01119118 0) inertia=(9.427762e-8 1.454902e-8 9.427762e-8 0 0 0)
        meshes=tibia.vtp
      WrapSphere tibia_prox: active=false translation=(0.0004625689 0.02581433 -0.000746079) quadrant=all
          radius=0.003730395
      WrapCylinder tibia_shaft: active=false xyz_body_rotation=(1.5708 0 0) translation=(0 0.0179805 0) quadrant=all
          radius=0.002611276 length=0.02103943
      WrapCylinder tibia_shaft2: active=false xyz_body_rotation=(1.5708 0 0) translation=(0 0.0179805 0) quadrant=-y
          radius=0.002611276 length=0.02103943
      WrapSphere ankle_sphere: active=false translation=(0.000887834 0.001738364 0.0001119118) quadrant=all
          radius=0.001865197
      WrapTorus ankle_torus: active=false xyz_body_rotation=(1.5708 0 0)
          translation=(0.000887834 0.001738364 0.0001119118) quadrant=all inner_radius=0.000746079
          outer_radius=0.002984316
    Body foot: mass=0.002091 mass_center=(0.008323354 -0.005945253 0)
        inertia=(3.695427e-8 2.394637e-5 2.394637e-7 0 0 0) meshes=foot.vtp
    Body pelvis_top_marker: mass=0 mass_center=(0 0 0) inertia=(0 0 0 0 0 0) meshes=sphere.vtp
    Body pelvis_bottom_marker: mass=0 mass_center=(0 0 0) inertia=(0 0 0 0 0 0) meshes=sphere.vtp
    Body hip_marker: mass=0 mass_center=(0 0 0) inertia=(0 0 0 0 0 0) meshes=sphere.vtp
    Body knee_marker: mass=0 mass_center=(0 0 0) inertia=(0 0 0 0 0 0) meshes=sphere.vtp
    Body ankle_marker: mass=0 mass_center=(0 0 0) inertia=(0 0 0 0 0 0) meshes=sphere.vtp
    Body mtp_marker: mass=0 mass_center=(0 0 0) inertia=(0 0 0 0 0 0) meshes=sphere.vtp
    Body toe_marker: mass=0 mass_center=(0 0 0) inertia=(0 0 0 0 0 0) meshes=sphere.vtp
  JointSet:
    CustomJoint ground_spine: socket_parent_frame=ground_offset socket_child_frame=spine_offset
      Coordinate sacrum_pitch: default_value=0.5235988 range=(-1.570796 1.570796) clamped=false
      Coordinate sacrum_roll: default_value=0 range=(-1.570796 1.570796) clamped=false
      Coordinate sacrum_yaw: default_value=0 range=(-1.570796 1.570796) clamped=false
      Coordinate sacrum_x: default_value=0 range=(-0.1 0.25) clamped=false
      Coordinate sacrum_y: default_value=0.05 range=(0 0.2) clamped=false
      Coordinate sacrum_z: default_value=0 range=(-0.1 0.1) clamped=false
      PhysicalOffsetFrame ground_offset: socket_parent=/ground translation=(0 0 0) [meters]
      PhysicalOffsetFrame spine_offset: socket_parent=/bodyset/spine translation=(0 0 0)
      SpatialTransform:
        TransformAxis rotation1: coordinates=sacrum_pitch axis=(0 0 1) LinearFunction(coefficients=1 0)
        TransformAxis rotation2: coordinates=sacrum_roll axis=(1 0 0) LinearFunction(coefficients=1 0)
        TransformAxis rotation3: coordinates=sacrum_yaw axis=(0 1 0) LinearFunction(coefficients=1 0)
        TransformAxis translation1: coordinates=sacrum_x axis=(1 0 0) LinearFunction(coefficients=1 0)
        TransformAxis translation2: coordinates=sacrum_y axis=(0 1 0) LinearFunction(coefficients=1 0)
        TransformAxis translation3: coordinates=sacrum_z axis=(0 0 1) LinearFunction(coefficients=1 0)
    CustomJoint sacroiliac: socket_parent_frame=spine_offset socket_child_frame=pelvis_offset
      Coordinate sacroiliac_flx: default_value=0.06457718 range=(-0.02301246 0.1515205) clamped=true locked=true
      PhysicalOffsetFrame spine_offset: socket_parent=/bodyset/spine translation=(0.004054739 -0.002432843 0.008109478)
      PhysicalOffsetFrame pelvis_offset: socket_parent=/bodyset/pelvis translation=(0 0 0)
      SpatialTransform: axes_held_at_zero=(rotation2 rotation3 translation1 translation2 translation3)
        TransformAxis rotation1: coordinates=sacroiliac_flx axis=(0 0 1) LinearFunction(coefficients=1 0)
    CustomJoint hip: socket_parent_frame=pelvis_offset socket_child_frame=femur_offset
      Coordinate hip_flx: default_value=0.6981317 range=(-0.8726646 1.22173) clamped=true
      Coordinate hip_add: default_value=-0.1745329 range=(-0.8726646 0.3490659) clamped=true
      Coordinate hip_int: default_value=0 range=(-0.8726646 0.6981317) clamped=true
      PhysicalOffsetFrame pelvis_offset: socket_parent=/bodyset/pelvis translation=(0 0 0)
      PhysicalOffsetFrame femur_offset: socket_parent=/bodyset/femur translation=(0 0 0)
      SpatialTransform: axes_held_at_zero=(translation1 translation2 translation3)
        TransformAxis rotation1: coordinates=hip_flx axis=(0 0 1) LinearFunction(coefficients=1 0)
        TransformAxis rotation2: coordinates=hip_add axis=(1 0 0) LinearFunction(coefficients=1 0)
        TransformAxis rotation3: coordinates=hip_int axis=(0 1 0) LinearFunction(coefficients=1 0)
    CustomJoint knee: socket_parent_frame=femur_offset socket_child_frame=tibia_offset
      Coordinate knee_flx: default_value=-2.094395 range=(-2.617994 -0.3490659) clamped=true
      PhysicalOffsetFrame femur_offset: socket_parent=/bodyset/femur translation=(0 -0.0346369 0)
      PhysicalOffsetFrame tibia_offset: socket_parent=/bodyset/tibia translation=(0 0.03133532 0)
      SpatialTransform: axes_held_at_zero=(rotation2 rotation3 translation1 translation2 translation3)
        TransformAxis rotation1: coordinates=knee_flx axis=(0 0 1) LinearFunction(coefficients=1 0)
    CustomJoint ankle: socket_parent_frame=tibia_offset socket_child_frame=foot_offset
      Coordinate ankle_flx: default_value=0.8726646 range=(-0.5235988 1.047198) clamped=false
      Coordinate ankle_add: default_value=-0.08726646 range=(-0.08726646 0.6108652) clamped=false
      Coordinate ankle_int: default_value=0 range=(-0.8726646 0.2617994) clamped=false
      PhysicalOffsetFrame tibia_offset: socket_parent=/bodyset/tibia translation=(0 0 0)
      PhysicalOffsetFrame foot_offset: socket_parent=/bodyset/foot translation=(0 0 0)
      SpatialTransform:
        TransformAxis rotation1: coordinates=ankle_flx axis=(0 0 1) LinearFunction(coefficients=1 0)
        TransformAxis rotation2: coordinates=ankle_add axis=(1 0 0) LinearFunction(coefficients=1 0)
        TransformAxis rotation3: coordinates=ankle_int axis=(0 1 0) LinearFunction(coefficients=1 0)
        TransformAxis translation1: coordinates=ankle_flx axis=(1 0 0)
          MultiplierFunction: scale=0.746079
            SimmSpline: x=(-0.523599 -0.349066 -0.174533 0 0.174533 0.349066 0.523599 0.698132 0.872665 1.0472)
                y=(0 0 0 0 0 0 0 0 0 0)
        TransformAxis translation2: coordinates=ankle_flx axis=(0 1 0)
          MultiplierFunction: scale=0.746079
            SimmSpline: x=(-0.523599 -0.349066 -0.174533 0 0.174533 0.349066 0.523599 0.698132 0.872665 1.0472)
                y=(0 0 0 0 0 0 0 0 0 0)
        TransformAxis translation3: coordinates=ankle_flx axis=(0 0 1)
          MultiplierFunction: scale=0.746079
            SimmSpline: x=(-0.523599 -0.349066 -0.174533 0 0.174533 0.349066 0.523599 0.698132 0.872665 1.0472)
                y=(0 0 0 0 0 0 0 0 0 0)
    WeldJoint pelvistopmarker_pelvis_weld: socket_parent_frame=pelvis_offset socket_child_frame=pelvistopmarker_offset
      PhysicalOffsetFrame pelvis_offset: socket_parent=/bodyset/pelvis translation=(0.0230677 0.0011966 0.00217976)
      PhysicalOffsetFrame pelvistopmarker_offset: socket_parent=/bodyset/pelvis_top_marker translation=(0 0 0)
    WeldJoint pelvisbottommarker_pelvis_weld: socket_parent_frame=pelvis_offset
        socket_child_frame=pelvisbottommarker_offset
      PhysicalOffsetFrame pelvis_offset: socket_parent=/bodyset/pelvis translation=(-0.0157738 -0.000382191 0.00422967)
      PhysicalOffsetFrame pelvisbottommarker_offset: socket_parent=/bodyset/pelvis_bottom_marker translation=(0 0 0)
    WeldJoint hipmarker_femur_weld: socket_parent_frame=pelvis_offset socket_child_frame=hipmarker_offset
      PhysicalOffsetFrame pelvis_offset: socket_parent=/bodyset/pelvis
          translation=(-0.000145081 -0.000866484 0.0071621)
      PhysicalOffsetFrame hipmarker_offset: socket_parent=/bodyset/hip_marker translation=(0 0 0)
    WeldJoint kneemarker_femur_weld: socket_parent_frame=femur_offset socket_child_frame=kneemarker_offset
      PhysicalOffsetFrame femur_offset: socket_parent=/bodyset/femur translation=(-0.000818233 -0.0361072 0.00320657)
      PhysicalOffsetFrame kneemarker_offset: socket_parent=/bodyset/knee_marker translation=(0 0 0)
    WeldJoint anklemarker_tibia_weld: socket_parent_frame=foot_offset socket_child_frame=anklemarker_offset
      PhysicalOffsetFrame foot_offset: socket_parent=/bodyset/tibia translation=(-0.000594359 -0.000835109 0.00170632)
      PhysicalOffsetFrame anklemarker_offset: socket_parent=/bodyset/ankle_marker translation=(0 0 0)
    WeldJoint mtp_foot_weld: socket_parent_frame=foot_offset socket_child_frame=mtpmarker_offset
      PhysicalOffsetFrame foot_offset: socket_parent=/bodyset/foot translation=(0.0154825 -0.00845288 0.00899034)
      PhysicalOffsetFrame mtpmarker_offset: socket_parent=/bodyset/mtp_marker translation=(0 0 0)
    WeldJoint toe_foot_weld: socket_parent_frame=foot_offset socket_child_frame=toemarker_offset
      PhysicalOffsetFrame foot_offset: socket_parent=/bodyset/foot translation=(0.0254012 -0.0120527 0.00932291)
      PhysicalOffsetFrame toemarker_offset: socket_parent=/bodyset/toe_marker translation=(0 0 0)
  ForceSet:
    Millard2012EquilibriumMuscle [values shared by the 38 below unless stated]: activation_time_constant=0.01 [seconds]
        deactivation_time_constant=0.04 [seconds]
      ActiveForceLengthCurve: minimum_value=0
      ForceVelocityCurve: concentric_slope_at_vmax=0 concentric_slope_near_vmax=0.25 isometric_slope=5
          eccentric_slope_at_vmax=0 eccentric_slope_near_vmax=0.15 max_eccentric_velocity_force_multiplier=1.4
      FiberForceLengthCurve
      TendonForceLengthCurve
    Millard2012EquilibriumMuscle BFa: max_isometric_force=3.4 optimal_fiber_length=0.04003379
        tendon_slack_length=0.001029146 pennation_angle_at_optimal=0.00698132 [radians]
      PathPoint P1: spine (-0.001946275 0.003649265 0.002513938)
      PathPoint P2: femur (-0.0001117319 -0.03374304 0.001787711)
      PathWrap: wrap_object=hip_cylinder_large2 method=hybrid
      PathWrap pathwrap_0: wrap_object=femur_prox method=hybrid
    Millard2012EquilibriumMuscle BFp: max_isometric_force=12.5 optimal_fiber_length=0.03940488
        tendon_slack_length=0.2135766 pennation_angle_at_optimal=0.127409
      PathPoint P1: pelvis (-0.01062342 0.001946275 -0.00186518)
      PathPoint P2: tibia (0.002611276 0.01783129 0.001939805)
      PathWrap: wrap_object=femur_prox method=hybrid
      PathWrap pathwrap_0: wrap_object=tibia_shaft method=hybrid
    Millard2012EquilibriumMuscle CF: max_isometric_force=2.1 optimal_fiber_length=0.03760751
        tendon_slack_length=0.2021909 pennation_angle_at_optimal=0
      PathPoint P1: spine (-0.003162697 0.005108971 0.002838317)
      PathPoint P2: femur (-0.002793298 -0.02927376 -0.002234638)
      PathWrap: wrap_object=hip_cylinder_small method=hybrid
      PathWrap pathwrap_0: wrap_object=femur_prox method=hybrid
    Millard2012EquilibriumMuscle STp: max_isometric_force=3.4 optimal_fiber_length=0.03972222
        tendon_slack_length=0.2042274 pennation_angle_at_optimal=0.00698132
      PathPoint P1: spine (-0.004541308 0.003324886 0.003000507)
      PathPoint P2: tibia (0.003506571 0.01723442 0)
      PathWrap: wrap_object=femur_prox2 method=hybrid
      PathWrap pathwrap_0: wrap_object=tibia_shaft2 method=hybrid
      PathWrap pathwrap_1: wrap_object=hip_cylinder_small method=hybrid
    Millard2012EquilibriumMuscle STa: max_isometric_force=12.5 optimal_fiber_length=0.03939881
        tendon_slack_length=0.2135437 pennation_angle_at_optimal=0.127409
      PathPoint P1: pelvis (-0.01175874 0.0009731374 -0.000729853)
      PathPoint P2: tibia (0.003506571 0.01723442 0)
      PathWrap: wrap_object=femur_prox method=hybrid
      PathWrap pathwrap_0: wrap_object=tibia_shaft2 method=hybrid
    Millard2012EquilibriumMuscle SM: max_isometric_force=10.3 optimal_fiber_length=0.03719949
        tendon_slack_length=0.2125685 pennation_angle_at_optimal=0
      PathPoint P1: pelvis (-0.01110999 -0.0008920426 -0.003000507)
      PathPoint P2: tibia (0.001641374 0.02611276 -0.001939805)
      PathWrap: wrap_object=tibia_shaft2 method=hybrid
    Millard2012EquilibriumMuscle QF: max_isometric_force=3 optimal_fiber_length=0.009556325
        tendon_slack_length=0.176969 pennation_angle_at_optimal=0.05061455
      PathPoint P1: pelvis (-0.008596047 -0.0005676635 -0.001946275)
      PathPoint P2: femur (-0.003240226 -0.004916205 0.001229051)
      PathWrap: wrap_object=femur_shaft_small method=hybrid
    Millard2012EquilibriumMuscle TFL: max_isometric_force=2.9 optimal_fiber_length=0.01471849
        tendon_slack_length=0.1962465 pennation_angle_at_optimal=0.148353
      PathPoint P1: pelvis (0.01727319 0.0004865687 0.002108464)
      PathPoint P2: femur (0.00636872 -0.01988828 0.00346369)
    Millard2012EquilibriumMuscle GMa: max_isometric_force=9.3 optimal_fiber_length=0.01759071
        tendon_slack_length=0.1832366 pennation_angle_at_optimal=0.2111848
      PathPoint P1: spine (0.01638115 0.004541308 0.003324886)
      PathPoint P2: femur (-0.001675979 -0.01094973 0.007150843)
      PathWrap: wrap_object=hip_cylinder_large2 method=hybrid
    Millard2012EquilibriumMuscle GMe: max_isometric_force=18.8 optimal_fiber_length=0.01695544
        tendon_slack_length=0.1730146 pennation_angle_at_optimal=0.2199115
      PathPoint P1: pelvis (0.01638115 0.003243791 -8.109478e-5)
      PathPoint P2: femur (-0.003016762 -0.003687153 0.007150843)
      PathWrap: wrap_object=hip_cylinder_small2 method=hybrid
      PathWrap pathwrap_0: wrap_object=femur_shaft_large method=hybrid
    Millard2012EquilibriumMuscle GMi: max_isometric_force=7.4 optimal_fiber_length=0.009992949
        tendon_slack_length=0.1722922 pennation_angle_at_optimal=0.286234
      PathPoint P1: pelvis (0.01054232 0.000729853 0.0003243791)
      PathPoint P2: femur (-0.0004469277 -0.0001117319 0.005363132)
    Millard2012EquilibriumMuscle Pir: max_isometric_force=11.2 optimal_fiber_length=0.009278779
        tendon_slack_length=0.1750713 pennation_angle_at_optimal=0.286234
      PathPoint P1: pelvis (0.009244805 0.003405981 -0.0005676635)
      PathPoint P2: femur (-0.001564247 0.001005587 0.004469277)
    Millard2012EquilibriumMuscle GP: max_isometric_force=2.4 optimal_fiber_length=0.03143719
        tendon_slack_length=0.2190745 pennation_angle_at_optimal=0.05759587
      PathPoint P1: pelvis (-0.01200203 -0.004460213 -0.005108971)
      PathPoint P2: tibia (0.003655787 0.0198457 -0.001342942)
      PathWrap: wrap_object=tibia_shaft2 method=hybrid
    Millard2012EquilibriumMuscle GA: max_isometric_force=1.6 optimal_fiber_length=0.03397857
        tendon_slack_length=0.2288119 pennation_angle_at_optimal=0
      PathPoint P1: pelvis (-0.005271161 -0.004784592 -0.004946782)
      PathPoint P2: tibia (0.002387453 0.02156168 -0.001268334)
      PathWrap: wrap_object=tibia_shaft2 method=hybrid
    Millard2012EquilibriumMuscle AL: max_isometric_force=1 optimal_fiber_length=0.01737366
        tendon_slack_length=0.2131738 pennation_angle_at_optimal=0.1692969
      PathPoint P1: pelvis (-0.003649265 -0.004054739 -0.004298024)
      PathPoint P2: femur (-0.001787711 -0.01899443 0.001229051)
    Millard2012EquilibriumMuscle AM: max_isometric_force=3 optimal_fiber_length=0.03043475
        tendon_slack_length=0.2181703 pennation_angle_at_optimal=0
      PathPoint P1: pelvis (-0.004946782 -0.004298024 -0.004541308)
      PathPoint P2: femur (-0.0006703915 -0.03351958 -0.00346369)
    Millard2012EquilibriumMuscle AB: max_isometric_force=12.2 optimal_fiber_length=0.02227817
        tendon_slack_length=0.1989123 pennation_angle_at_optimal=0.2251475
      PathPoint P1: pelvis (-0.008677142 -0.004703497 -0.005352256)
      PathPoint P2: femur (-0.001787711 -0.01832404 0.003910617)
    Millard2012EquilibriumMuscle Pec: max_isometric_force=3.7 optimal_fiber_length=0.009120479
        tendon_slack_length=0.225197 pennation_angle_at_optimal=0.09773844
      PathPoint P1: pelvis (0.000729853 -0.002757223 -0.002676128)
      PathPoint P2: femur (-0.002011175 -0.01195532 0.002122907)
    Millard2012EquilibriumMuscle IP: max_isometric_force=16.3 optimal_fiber_length=0.01375669
        tendon_slack_length=0.1618434 pennation_angle_at_optimal=0.1500983
      PathPoint P1: spine (0.0435479 0.004054739 0.002432843)
      PathPoint P2: femur (-0.00234637 -0.005921792 0.0001117319)
    Millard2012EquilibriumMuscle OE: max_isometric_force=7.2 optimal_fiber_length=0.004894915
        tendon_slack_length=0.1687902 pennation_angle_at_optimal=0.2984513
      PathPoint P1: pelvis (-0.007217436 -0.002189559 -0.002513938)
      PathPoint P2: femur (-0.001787711 0.0005586596 0.003910617)
    Millard2012EquilibriumMuscle OI: max_isometric_force=3 optimal_fiber_length=0.003680529
        tendon_slack_length=0.1672968 pennation_angle_at_optimal=0.1221731
      PathPoint P1: pelvis (-0.005108971 0.00389255 -0.002108464)
      PathPoint P2: femur (-0.002122907 0.0007821235 0.002681566)
    Millard2012EquilibriumMuscle GS: max_isometric_force=0.4 optimal_fiber_length=0.005666067
        tendon_slack_length=0.1888689 pennation_angle_at_optimal=0.1884956
      PathPoint P1: pelvis (0.002351749 0.001135327 -0.001784085)
      PathPoint P2: femur (-0.001229051 0.001675979 0.002681566)
    Millard2012EquilibriumMuscle GI: max_isometric_force=2.9 optimal_fiber_length=0.003674842
        tendon_slack_length=0.1792606 pennation_angle_at_optimal=0.3298672
      PathPoint P1: pelvis (-0.004541308 0.001946275 -0.001054232)
      PathPoint P2: femur (-0.00346369 -0.0007821235 0.00234637)
    Millard2012EquilibriumMuscle RF: max_isometric_force=16.5 optimal_fiber_length=0.01337996
        tendon_slack_length=0.2248733 pennation_angle_at_optimal=0.1972222
      PathPoint P1: pelvis (0.003649265 -8.109478e-5 0.001216422)
      PathPoint P2: tibia (0.001939805 0.02797796 0.0003730395)
      PathWrap: wrap_object=femur_dist method=hybrid
      PathWrap pathwrap_0: wrap_object=femur_shaft_small method=hybrid
    Millard2012EquilibriumMuscle VL: max_isometric_force=14.9 optimal_fiber_length=0.0215462
        tendon_slack_length=0.2221258 pennation_angle_at_optimal=0.2548181
      PathPoint P1: femur (-0.001229051 -0.004022349 0.006256988)
      PathPoint P2: tibia (0.001939805 0.02797796 0.0003730395)
      PathWrap: wrap_object=femur_dist method=hybrid
      PathWrap pathwrap_0: wrap_object=femur_shaft_small method=hybrid
    Millard2012EquilibriumMuscle VI: max_isometric_force=2.6 optimal_fiber_length=0.01237001
        tendon_slack_length=0.2189383 pennation_angle_at_optimal=0.2495821
      PathPoint P1: femur (0.0008938554 -0.0129609 0.003575422)
      PathPoint P2: tibia (0.001939805 0.02797796 0.0003730395)
      PathWrap: wrap_object=femur_dist method=hybrid
      PathWrap pathwrap_0: wrap_object=femur_shaft_small method=hybrid
    Millard2012EquilibriumMuscle VM: max_isometric_force=6.1 optimal_fiber_length=0.01688768
        tendon_slack_length=0.2207539 pennation_angle_at_optimal=0.2024582
      PathPoint P1: femur (-0.0002234638 -0.008268162 0.001340783)
      PathPoint P2: tibia (0.001939805 0.02797796 0.0003730395)
      PathWrap: wrap_object=femur_dist method=hybrid
      PathWrap pathwrap_0: wrap_object=femur_shaft_small method=hybrid
    Millard2012EquilibriumMuscle MG: max_isometric_force=11.7 optimal_fiber_length=0.01063795
        tendon_slack_length=0.1487826 pennation_angle_at_optimal=0.2373648
      PathPoint P1: femur (-0.003016762 -0.03106147 -0.00234637)
      PathPoint P2: foot (-0.004756202 0.0004756202 0.001189051)
    Millard2012EquilibriumMuscle LG: max_isometric_force=18.3 optimal_fiber_length=0.009131459
        tendon_slack_length=0.148479 pennation_angle_at_optimal=0.1675516
      PathPoint P1: femur (-0.003351958 -0.03173187 0.001899443)
      PathPoint P2: foot (-0.004756202 0.0004756202 0.001189051)
    Millard2012EquilibriumMuscle Pla: max_isometric_force=5.6 optimal_fiber_length=0.009132312
        tendon_slack_length=0.1484929 pennation_angle_at_optimal=0.1972222
      PathPoint P1: femur (-0.002569834 -0.03072628 0.001229051)
      PathPoint P2: foot (-0.004756202 0.0004756202 0.001189051)
    Millard2012EquilibriumMuscle Sol: max_isometric_force=1.4 optimal_fiber_length=0.01216464
        tendon_slack_length=0.1559569 pennation_angle_at_optimal=0.07679449
      PathPoint P1: tibia (-0.002462061 0.02499364 0.001790589)
      PathPoint P2: foot (-0.004756202 0.0004756202 0.001189051)
    Millard2012EquilibriumMuscle TA: max_isometric_force=8.6 optimal_fiber_length=0.01076194
        tendon_slack_length=0.1444556 pennation_angle_at_optimal=0.164061
      PathPoint P1: tibia (0.002462061 0.02506825 0.001939805)
      PathPoint P2: foot (0.005707443 -0.002615911 -0.0008323354)
      PathWrap: wrap_object=ankle_sphere method=hybrid
      PathWrap pathwrap_0: wrap_object=ankle_torus method=hybrid
    Millard2012EquilibriumMuscle EDL: max_isometric_force=2.2 optimal_fiber_length=0.009790435
        tendon_slack_length=0.1461259 pennation_angle_at_optimal=0.1850049
      PathPoint P1: tibia (0.0008952947 0.02924629 0.002089021)
      PathPoint P2: foot (0.004042772 -0.002021386 0.001307956)
      PathWrap: wrap_object=ankle_sphere method=hybrid
      PathWrap pathwrap_0: wrap_object=ankle_torus method=hybrid
    Millard2012EquilibriumMuscle TP: max_isometric_force=3.6 optimal_fiber_length=0.004071581
        tendon_slack_length=0.1536446 pennation_angle_at_optimal=0.09948377
      PathPoint P1: tibia (-0.001119118 0.02529208 7.46079e-5)
      PathPoint P2: foot (-0.0008323354 -0.002021386 -0.001307956)
      PathWrap: wrap_object=ankle_sphere method=hybrid
      PathWrap pathwrap_0: wrap_object=ankle_torus method=hybrid
    Millard2012EquilibriumMuscle FDL: max_isometric_force=11.1 optimal_fiber_length=0.006753646
        tendon_slack_length=0.153492 pennation_angle_at_optimal=0.1937316
      PathPoint P1: tibia (-0.001865197 0.02641119 0)
      PathPoint P2: foot (-0.0008323354 -0.002021386 -0.001307956)
      PathWrap: wrap_object=ankle_sphere method=hybrid
      PathWrap pathwrap_0: wrap_object=ankle_torus method=hybrid
    Millard2012EquilibriumMuscle FHL: max_isometric_force=0.2 optimal_fiber_length=0.004148403
        tendon_slack_length=0.1536446 pennation_angle_at_optimal=0.02268928
      PathPoint P1: tibia (-0.001119118 0.02529208 7.46079e-5)
      PathPoint P2: foot (-0.0008323354 -0.002021386 -0.001307956)
      PathWrap: wrap_object=ankle_sphere method=hybrid
      PathWrap pathwrap_0: wrap_object=ankle_torus method=hybrid
    Millard2012EquilibriumMuscle Per: max_isometric_force=7.7 optimal_fiber_length=0.006586934
        tendon_slack_length=0.149703 pennation_angle_at_optimal=0.1099557
      PathPoint P1: tibia (-0.00141755 0.02633659 0.002163629)
      PathPoint P2: foot (0.003329342 -0.003210436 0.002021386)
      PathWrap: wrap_object=ankle_sphere method=hybrid
      PathWrap pathwrap_0: wrap_object=ankle_torus method=hybrid
    Millard2012EquilibriumMuscle Pop: max_isometric_force=2.9 optimal_fiber_length=0.004453206
        tendon_slack_length=0.1413716 pennation_angle_at_optimal=0.2426008
      PathPoint P1: femur (-0.002681566 -0.03441343 0.001899443)
      PathPoint P2: tibia (0.0004476474 0.02021874 -0.001715982)
      PathWrap: wrap_object=tibia_prox method=hybrid
    ObjectGroup hamstrings: members=(BFa BFp CF GA GP SM STa STp)
    ObjectGroup hip_cuffs: members=(GI GS OE OI Pir QF)
    ObjectGroup hip_flexors: members=(IP Pec TFL)
    ObjectGroup gluteals: members=(GMa GMe GMi)
    ObjectGroup adductors: members=(AB AL AM GA GP)
    ObjectGroup quadriceps: members=(RF VI VL VM)
    ObjectGroup calf_muscles: members=(LG MG Pla Sol)
    ObjectGroup anterior_crural: members=(EDL TA)
    ObjectGroup posterior_crural: members=(FDL FHL TP)
    ObjectGroup others: members=(Per Pop)
  MarkerSet:
    Marker pelvis_top: pelvis (0.02306773 0.001196597 0.002179756)
    Marker hip: pelvis (-0.0001450814 -0.0008664837 0.007162095)
    Marker knee: femur (-0.0008182326 -0.03610717 0.003206574)
    Marker ankle: tibia (-0.0005943586 -0.0008351089 0.001706316)
    Marker toe: foot (0.02540123 -0.01205267 0.00932291)
    Marker pelvis_bottom: pelvis (-0.0157738 -0.0003821915 0.004229668)
    Marker mtp: foot (0.01548245 -0.008452881 0.008990336)
